<Node name="root" gravity="0 0 -9.81" dt="0.005">
    <RequiredPlugin name="SofaOpenglVisual"/>
    <VisualStyle displayFlags="showVisual showBehaviorModels showInteractionForceFields showCollisionModels" />
    <DefaultPipeline name="DefaultCollisionPipeline" verbose="0" draw="0" depth="6" />
    <BruteForceBroadPhase/>
    <BVHNarrowPhase/>
    <MinProximityIntersection name="Proximity" alarmDistance="3" contactDistance="2" />
    <DefaultContactManager name="Response" response="default" />
    <Node name="Object" gravity="0 -9.81 0">
        <EulerImplicitSolver name="Implicit Euler Solver"  rayleighStiffness="0.1" rayleighMass="0.1" />
        <CGLinearSolver template="GraphScattered" name="Conjugate Gradient" iterations="25" tolerance="1e-5" threshold="1e-5"/>
        <SparseGridTopology name="Embedded Sparse Grid" fileTopology="diamond_tes6.obj" n="7 6 5" />
        <MechanicalObject template="Vec3d" name="Particles" restScale="1" position="0 0 0" />
        <UniformMass template="Vec3d" name="Mass" />
        <HexahedronFEMForceField template="Vec3d" name="FEM" poissonRatio="0.45" youngModulus="200000" />
        <Node name="VisualNode" gravity="0 -9.81 0">
            <MeshObjLoader name="meshLoader_1" filename="diamond_tes6.obj" handleSeams="1" />
            <OglModel template="ExtVec3f" name="Objective" src="@meshLoader_1" />
            <BarycentricMapping name="Visual Mapping" output="@Objective" />
        </Node>
        <Node name="CollisionNode" gravity="0 -9.81 0">
            <MeshObjLoader name="meshLoader1" filename="diamond_tes6.obj" />
            <MeshTopology name="Mesh" src="@meshLoader1" />
            <MechanicalObject template="Vec3d" name="CollisionObject" scale3d="1 1 1" restScale="1" />
            <PointCollisionModel name="Points" />
            <LineCollisionModel name="Lines" />
            <TriangleCollisionModel template="Vec3d" name="Triangles" />
            <BarycentricMapping  name="MechanicalMapping"  />
        </Node>
    </Node>
</Node>
